# OpenSim document version 40500
AnalyzeTool athlete_0_scaled_increased_force_3:
  model_file: /Users/marcelhacker/Documents/opensim-deadlift-techniques/athlete_0_increased_force_3/sumo_dl_1/../athlete_0_increased_force_3.osim
  replace_force_set: false
  force_set_files: actuators_so.xml
  results_directory: .
  output_precision: 4
  initial_time: 6.5
  final_time: 9
  solve_for_equilibrium_for_auxiliary_states: false
  maximum_number_of_integrator_steps: 20000
  maximum_integrator_step_size: 1
  integrator_error_tolerance: 1e-7
  external_loads_file: grf.xml
  coordinates_file: athlete_0_scaled_increased_force_3_Kinematics_q.sto
  speeds_file: athlete_0_scaled_increased_force_3_Kinematics_u.sto
  AnalysisSet Analyses:
    InducedAccelerations: step_interval=40 in_degrees=true coordinate_names=knee_angle_r body_names=center_of_mass
        force_threshold=15 [N]
      ConstraintSet:
        PointConstraint
